OpenVSP model (file version 5), 40 components.
Geometry view with OpenVSP parameter names; values to 6 digits, angles in degrees, lengths in the model's unit.
Overall bounding box: X_Min=-0.0404468 X_Len=29.5122 Y_Min=-26.0934 Y_Len=52.1868 Z_Min=-1.834 Z_Len=11.7104

Fuselage "Fuselage"
  location (X Y Z) 0 0 0, rotation 0 0 0
  bounding box size 28.5591 6.00709 6.75408
  Design: Length=28.2143
  cross sections:
    n  XLocPercent  YLocPercent  ZLocPercent  shape
    0  0            0            0            point
    1  0.0376642    0            0.0204918    super ellipse Super_Height=2.03887 Super_M=4.9157 Super_MaxWidthLoc=0 Super_N=3.61357 Super_Width=4.13726
    2  0.104433     0            0.0491803    super ellipse Super_Height=3.95369 Super_M=7.95429 Super_MaxWidthLoc=0 Super_N=2 Super_Width=5.52886
    3  0.210873     0            0.0778689    super ellipse Super_Height=5.94286 Super_M=7.82786 Super_MaxWidthLoc=0 Super_N=2 Super_Width=5.9964
    4  0.408155     0            0.0942623    super ellipse Super_Height=6.47347 Super_M=10.525 Super_MaxWidthLoc=0 Super_N=2 Super_Width=5.53286
    5  0.616756     0            0.110656     super ellipse Super_Height=4.19184 Super_M=6.60571 Super_MaxWidthLoc=0 Super_N=2 Super_Width=3.34723
    6  0.808378     0            0.125        general fuselage BotStr=0.83 BotTanAngle=90 CornerRad=0 Height=2.06939 LowStr=0.83 MaxWidthLoc=0 TopStr=0.83 TopTanAngle=90 UpStr=0.83 Width=1.40893
    7  1            0            0.127049     point

Wing "Wing"
  location (X Y Z) 8.93443 0 5.4918, rotation 0 0 0
  symmetric about XZ
  bounding box size 5.00061 49.736 0.851658
  totals: TotalSpan=49.736 TotalProjectedSpan=49.736 TotalChord=3.96508 TotalArea=205.791 TotalAR=12.0203 MAC=3.83584
  root: chord 5, twist 0, airfoil file "NASA/LANGLEY LS(1)-0417 (GA(W)-1) AIRFOIL"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 BaseThickChord=0.16998 ThickChord=0.16998
  sections:
    n   Span      Root_Chord  Tip_Chord  Area      Sweep     Sweep_Location  Dihedral  Twist  Twist_Location  tip airfoil
    1   3.87184   5           4.76395    18.9022   0.428571  0               0         0      0.25            as above
    2   0         4.76395     5.00348    0         0         0               0         0      0.25            airfoil file "NASA/LANGLEY LS(1)-0417 (GA(W)-1) AIRFOIL fwd"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 BaseThickChord=0.169999 ThickChord=0.169999
    3   2.09002   5.00348     4.87935    10.3277   0.428571  0               0         0      0.25            as above
    4   0         4.87935     4.64181    0         0         0               0         0      0.25            airfoil file "NASA/LANGLEY LS(1)-0417 (GA(W)-1) AIRFOIL"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 BaseThickChord=0.16998 ThickChord=0.16998
    5   2.23318   4.64181     4.4569     10.1595   0         0               0         0      0.25            as above
    6   0         4.4569      4.58146    0         0         0               0         0      0.25            airfoil file "NASA/LANGLEY LS(1)-0417 (GA(W)-1) AIRFOIL fwd"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 BaseThickChord=0.169999 ThickChord=0.169999
    7   5.64226   4.58146     4.10229    24.498    0.428571  0               0         0      0.25            as above
    8   0         4.10229     4.06957    0         0         0               0         0      0.25            airfoil file "NASA/LANGLEY LS(1)-0417 (GA(W)-1) AIRFOIL"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 BaseThickChord=0.16998 ThickChord=0.16998
    9   2.29927   4.06957     3.83854    9.09145   0.428571  0               0         0      0.25            as above
    10  0         3.83854     3.8785     0         0.428571  0               0         0      0.25            airfoil file "NASA/LANGLEY LS(1)-0417 (GA(W)-1) AIRFOIL fwd"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 BaseThickChord=0.169999 ThickChord=0.169999
    11  5.61519   3.8785      3.34077    20.2688   0.357143  0.117857        0         0      0.25            as above
    12  0         3.34077     3.43564    0         4.14286   0               0         0      0.25            airfoil file "NASA/LANGLEY LS(1)-0417 (GA(W)-1) AIRFOIL"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 BaseThickChord=0.16998 ThickChord=0.16998
    13  1.55812   3.43564     3.22176    5.18653   5.42857   0.117857        0         0      0.25            as above
    14  0.779062  3.22176     3.00915    2.42713   1.96429   0.471429        0         0      0.25            as above
    15  0.389531  3.00915     2.61135    1.09468   31.9643   0.471429        0         0      0.25            as above
    16  0.389531  2.61135     2.21354    0.939721  31.9643   0.471429        0         0      0.25            as above

Wing "HTail"
  location (X Y Z) 24.1189 0 3.77049, rotation 0 0 0
  symmetric about XZ
  bounding box size 3.16667 12.9206 0.475206
  totals: TotalSpan=12.9206 TotalProjectedSpan=12.9206 TotalChord=2.47817 TotalArea=35.4641 TotalAR=4.70738 MAC=2.77879
  root: chord 3.16667, twist 0, NACA 4-series Camber=0 CamberLoc=0.2 ThickChord=0.15
  sections:
    n  Span      Root_Chord  Tip_Chord  Area     Sweep    Sweep_Location  Dihedral  Twist  Twist_Location  tip airfoil
    1  5.65476   3.16667     2.5        16.0218  3.85714  0               0         0      0.25            as above
    2  0.805556  2.5         1.74603    1.71021  39.4286  0               0         0      0.25            NACA 4-series Camber=0 CamberLoc=0.2 ThickChord=0.1
  SS_Control "ELEVATOR": UStart=0.281707 UEnd=0.509804 Length_C_Start=0.2 Length_C_End=0.2 Length_Start=0.616423 Length_End=0.494087 LE_Flag=0 Surf_Type=2

Wing "VTail"
  location (X Y Z) 23.2377 0 3.68852, rotation 90 0 0
  symmetric about XZ
  bounding box size 6.23408 0.592118 6.18791
  totals: TotalSpan=12.3758 TotalProjectedSpan=12.3758 TotalChord=3.49842 TotalArea=44.1743 TotalAR=3.46719 MAC=3.7161
  root: chord 4.83333, twist 0, NACA 4-series Camber=0 CamberLoc=0.2 ThickChord=0.12
  sections:
    n  Span      Root_Chord  Tip_Chord  Area     Sweep    Sweep_Location  Dihedral  Twist  Twist_Location  tip airfoil
    1  0.904762  4.83333     4.93254    4.41789  10       0               0         0      0.25            as above
    2  0.641185  4.93254     3.71485    2.77229  63.9643  0               0         0      0.25            NACA 4-series Camber=0 CamberLoc=0.2 ThickChord=0.14
    3  2.75152   3.71485     3.15578    9.45232  22.4821  0               0         0      0.25            NACA 4-series Camber=0 CamberLoc=0.2 ThickChord=0.15
    4  1.00758   3.15578     3.05931    3.13109  19.2893  0               0         0      0.25            NACA 4-series Camber=0 CamberLoc=0.2 ThickChord=0.14
    5  0.441434  3.05931     2.75575    1.28348  37.094   0.210714        0         0      0.25            NACA 4-series Camber=0 CamberLoc=0.2 ThickChord=0.12
    6  0.441434  2.75575     1.91125    1.03009  60.6092  0.210714        0         0      0.25            as above
  SS_Control "RUDDER": UStart=0.234756 UEnd=0.745098 Length_C_Start=0.194523 Length_C_End=0.345831 Length_Start=0.95714 Length_End=0.95714 LE_Flag=0 Surf_Type=2

Blank "LG_PARENT"
  location (X Y Z) 0 0 0, rotation 0 0 0

Wing "FWD_LG", child of "LG_PARENT"
  location (X Y Z) 5.53279 2.16667 0, rotation -65 0 0
  symmetric about XZ
  bounding box size 1.16667 5.87127 1.69932
  totals: TotalSpan=3.43307 TotalProjectedSpan=3.43307 TotalChord=1.06349 TotalArea=3.65104 TotalAR=3.22811 MAC=1.06683
  root: chord 1.16667, twist 0, NACA 4-series Camber=0 CamberLoc=0.2 ThickChord=0.5
  sections:
    n  Span     Root_Chord  Tip_Chord  Area     Sweep    Sweep_Location  Dihedral  Twist  Twist_Location  tip airfoil
    1  1.71654  1.16667     0.960317   1.82552  4.38929  0               0         0      0.25            NACA 4-series Camber=0 CamberLoc=0.2 ThickChord=0.1

Wing "AFT_LG", child of "LG_PARENT"
  location (X Y Z) 12.1721 2.16667 0, rotation -65 0 0
  symmetric about XZ
  bounding box size 1.16667 5.87127 1.69932
  totals: TotalSpan=3.43307 TotalProjectedSpan=3.43307 TotalChord=1.06349 TotalArea=3.65104 TotalAR=3.22811 MAC=1.06683
  root: chord 1.16667, twist 0, NACA 4-series Camber=0 CamberLoc=0.2 ThickChord=0.5
  sections:
    n  Span     Root_Chord  Tip_Chord  Area     Sweep    Sweep_Location  Dihedral  Twist  Twist_Location  tip airfoil
    1  1.71654  1.16667     0.960317   1.82552  4.38929  0               0         0      0.25            NACA 4-series Camber=0 CamberLoc=0.2 ThickChord=0.1

Fuselage "LG_BASE", child of "LG_PARENT"
  location (X Y Z) 3.85246 -3.03279 -1.63934, rotation 0 0 0.57377
  symmetric about XZ
  bounding box size 10.3209 6.44204 0.669954
  Design: Length=10.3214
  cross sections:
    n  XLocPercent  YLocPercent  YRotate  ZLocPercent  shape
    0  0            0            0        0.0368852    point
    1  0.00270425   0            0        0.0368852    circle Circle_Diameter=0.152672
    2  0.00540849   0            17.3571  0.0368852    circle Circle_Diameter=0.19084
    3  0.0942623    0            0        0            circle Circle_Diameter=0.389313
    4  0.5          0            0        0            as above
    5  0.911885     0            0        0            as above
    6  1            0            0        0.0102459    point

Blank "PROP"
  location (X Y Z) 0 0 5, rotation 0 0 0

Blank "IB_PROP", child of "PROP"
  location (X Y Z) 0 0 5, rotation 0 0 0

Fuselage "IB_SUPPORT_L", child of "IB_PROP"
  location (X Y Z) 4.2623 -7.29508 5, rotation 0 0 1.63934
  bounding box size 13.1018 1.50683 1.16568
  Design: Length=13.1071
  cross sections:
    n  XLocPercent  YLocPercent  ZLocPercent  shape
    0  0            0            0            point
    1  0.25         0            0            circle Circle_Diameter=0.729962
    2  0.5          0            0            as above
    3  0.75         0            0            as above
    4  1            0            0            point

Fuselage "IB_SUPPORT_R", child of "IB_PROP"
  location (X Y Z) 4.2623 7.295 5, rotation 0 0 -1.639
  bounding box size 13.1018 1.50676 1.16568
  Design: Length=13.1071
  cross sections:
    n  XLocPercent  YLocPercent  ZLocPercent  shape
    0  0            0            0            point
    1  0.25         0            0            circle Circle_Diameter=0.729962
    2  0.5          0            0            as above
    3  0.75         0            0            as above
    4  1            0            0            point

Fuselage "ROTOR_HUB_IB_FWD_L", child of "IB_PROP"
  location (X Y Z) 4.262 -7.377 5.98361, rotation 0 90 0
  bounding box size 1.11927 1.11927 1
  Design: Length=1
  cross sections:
    n  XLocPercent  YLocPercent  ZLocPercent  shape
    0  0            0            0            point
    1  0.25         0            0            circle Circle_Diameter=1.11927
    2  0.5          0            0            as above
    3  0.75         0            0            as above
    4  1            0            0            point

Fuselage "ROTOR_HUB_IB_FWD_R", child of "IB_PROP"
  location (X Y Z) 4.262 7.377 5.98361, rotation 0 90 0
  bounding box size 1.11927 1.11927 1
  Design: Length=1
  cross sections:
    n  XLocPercent  YLocPercent  ZLocPercent  shape
    0  0            0            0            point
    1  0.25         0            0            circle Circle_Diameter=1.11927
    2  0.5          0            0            as above
    3  0.75         0            0            as above
    4  1            0            0            point

Fuselage "ROTOR_HUB_IB_AFT_L", child of "IB_PROP"
  location (X Y Z) 17.3558 -6.91867 5.98361, rotation 0 90 0
  bounding box size 1.11927 1.11927 1
  Design: Length=1
  cross sections:
    n  XLocPercent  YLocPercent  ZLocPercent  shape
    0  0            0            0            point
    1  0.25         0            0            circle Circle_Diameter=1.11927
    2  0.5          0            0            as above
    3  0.75         0            0            as above
    4  1            0            0            point

Fuselage "ROTOR_HUB_IB_AFT_R", child of "IB_PROP"
  location (X Y Z) 17.3558 6.919 5.98361, rotation 0 90 0
  bounding box size 1.11927 1.11927 1
  Design: Length=1
  cross sections:
    n  XLocPercent  YLocPercent  ZLocPercent  shape
    0  0            0            0            point
    1  0.25         0            0            circle Circle_Diameter=1.11927
    2  0.5          0            0            as above
    3  0.75         0            0            as above
    4  1            0            0            point

Propeller "IB_FWD_PROP", child of "IB_PROP"
  location (X Y Z) 4.2623 -7.377 5.6, rotation 0 90 0
  symmetric about XZ
  bounding box size 7.66449 21.3751 0.581748
  Design: Diameter=8 NumBlade=5 Beta34=20 UseBeta34Flag=1 Feather=0 Rotate=72 Precone=0 ReverseFlag=1 FoldAngle=0 PropMode=0 AF=152.073 CLi=0.540115 Chord=0.175783 Solidity=0.279767 ConstructXoC=0.25 FeatherAxisXoC=0.25 FeatherOffsetXoC=0
  cross sections:
    n  RadiusFrac  shape
    0  0.118033    airfoil file "BOEING-VERTOL VR-12 AIRFOIL"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 BaseThickChord=0.106373 Chord=0.32 ThickChord=0.5
    1  0.247542    airfoil file "BOEING-VERTOL VR-12 AIRFOIL"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 BaseThickChord=0.106373 Chord=0.526058 Scale=0.707143 ThickChord=0.235885
    2  0.315387    airfoil file "SIKORSKY SSC-A09  AIRFOIL"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 BaseThickChord=0.0901604 Chord=0.61548 Scale=1.5 ThickChord=0.188963
    3  1           airfoil file "SIKORSKY SSC-A09  AIRFOIL"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 BaseThickChord=0.0901604 Chord=0.52 Scale=0.357143 ThickChord=0.03
  Chord along r/R (cubic Bezier): 0.118033: 0.08, 0.278689: 0.15, 0.439344: 0.2, 0.6: 0.2, 0.716667: 0.2, 0.833333: 0.2, 0.95: 0.2, 0.966667: 0.2, 0.983333: 0.2, 1: 0.13
  Twist along r/R (PCHIP): 0.118033: 46.75, 0.75: 20, 1: 13
  Thick along r/R (cubic Bezier): 0.118033: 0.5, 0.178689: 0.3, 0.239344: 0.225, 0.3: 0.2, 0.4: 0.125, 0.5: 0.115, 0.6: 0.1, 0.733333: 0.075, 0.866667: 0.055, 1: 0.03
  CLI along r/R (cubic Bezier): 0.118033: 0, 0.212022: 0.7, 0.306011: 0.7, 0.4: 0.7, 0.466667: 0.7, 0.533333: 0.7, 0.6: 0.7, 0.733333: 0.7, 0.866667: 0.7, 1: 0.2

Propeller "IB_AFT_PROP", child of "IB_PROP"
  location (X Y Z) 17.356 -6.919 5.6, rotation 0 90 0
  symmetric about XZ
  bounding box size 7.68683 21.5248 0.581748
  Design: Diameter=8 NumBlade=4 Beta34=20 UseBeta34Flag=1 Feather=0 Rotate=72 Precone=0 ReverseFlag=1 FoldAngle=0 PropMode=0 AF=152.073 CLi=0.540115 Chord=0.175783 Solidity=0.223813 ConstructXoC=0.25 FeatherAxisXoC=0.25 FeatherOffsetXoC=0
  cross sections:
    n  RadiusFrac  shape
    0  0.118033    airfoil file "BOEING-VERTOL VR-12 AIRFOIL"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 BaseThickChord=0.106373 Chord=0.32 ThickChord=0.5
    1  0.247542    airfoil file "BOEING-VERTOL VR-12 AIRFOIL"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 BaseThickChord=0.106373 Chord=0.526058 Scale=0.707143 ThickChord=0.235885
    2  0.315387    airfoil file "SIKORSKY SSC-A09  AIRFOIL"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 BaseThickChord=0.0901604 Chord=0.61548 Scale=1.5 ThickChord=0.188963
    3  1           airfoil file "SIKORSKY SSC-A09  AIRFOIL"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 BaseThickChord=0.0901604 Chord=0.52 Scale=0.357143 ThickChord=0.03
  blade curves as in "IB_FWD_PROP"

Blank "MID_PROP", child of "PROP"
  location (X Y Z) 0 0 5, rotation 0 0 0

Fuselage "MID_SUPPORT_L", child of "MID_PROP"
  location (X Y Z) 4.34426 -15.4098 5, rotation 0 0 1.63934
  bounding box size 13.1018 1.50683 1.16568
  Design: Length=13.1071
  cross sections:
    n  XLocPercent  YLocPercent  ZLocPercent  shape
    0  0            0            0            point
    1  0.25         0            0            circle Circle_Diameter=0.729962
    2  0.5          0            0            as above
    3  0.75         0            0            as above
    4  1            0            0            point

Fuselage "MID_SUPPORT_R", child of "MID_PROP"
  location (X Y Z) 4.34426 15.41 5, rotation 0 0 -1.639
  bounding box size 13.1018 1.50676 1.16568
  Design: Length=13.1071
  cross sections:
    n  XLocPercent  YLocPercent  ZLocPercent  shape
    0  0            0            0            point
    1  0.25         0            0            circle Circle_Diameter=0.729962
    2  0.5          0            0            as above
    3  0.75         0            0            as above
    4  1            0            0            point

Fuselage "ROTOR_HUB_MID_FWD_L", child of "MID_PROP"
  location (X Y Z) 4.262 -15.41 5.98361, rotation 0 90 0
  bounding box size 1.11927 1.11927 1
  Design: Length=1
  cross sections:
    n  XLocPercent  YLocPercent  ZLocPercent  shape
    0  0            0            0            point
    1  0.25         0            0            circle Circle_Diameter=1.11927
    2  0.5          0            0            as above
    3  0.75         0            0            as above
    4  1            0            0            point

Fuselage "ROTOR_HUB_MID_FWD_R", child of "MID_PROP"
  location (X Y Z) 4.262 15.41 5.98361, rotation 0 90 0
  bounding box size 1.11927 1.11927 1
  Design: Length=1
  cross sections:
    n  XLocPercent  YLocPercent  ZLocPercent  shape
    0  0            0            0            point
    1  0.25         0            0            circle Circle_Diameter=1.11927
    2  0.5          0            0            as above
    3  0.75         0            0            as above
    4  1            0            0            point

Fuselage "ROTOR_HUB_MID_AFT_L", child of "MID_PROP"
  location (X Y Z) 17.4377 -15.0336 5.98361, rotation 0 90 0
  bounding box size 1.11927 1.11927 1
  Design: Length=1
  cross sections:
    n  XLocPercent  YLocPercent  ZLocPercent  shape
    0  0            0            0            point
    1  0.25         0            0            circle Circle_Diameter=1.11927
    2  0.5          0            0            as above
    3  0.75         0            0            as above
    4  1            0            0            point

Fuselage "ROTOR_HUB_MID_AFT_R", child of "MID_PROP"
  location (X Y Z) 17.4377 15.034 5.98361, rotation 0 90 0
  bounding box size 1.11927 1.11927 1
  Design: Length=1
  cross sections:
    n  XLocPercent  YLocPercent  ZLocPercent  shape
    0  0            0            0            point
    1  0.25         0            0            circle Circle_Diameter=1.11927
    2  0.5          0            0            as above
    3  0.75         0            0            as above
    4  1            0            0            point

Propeller "MID_FWD_PROP", child of "MID_PROP"
  location (X Y Z) 4.2623 -15.41 5.6, rotation 0 90 0
  symmetric about XZ
  bounding box size 7.66449 37.4411 0.581748
  Design: Diameter=8 NumBlade=5 Beta34=20 UseBeta34Flag=1 Feather=0 Rotate=72 Precone=0 ReverseFlag=1 FoldAngle=0 PropMode=0 AF=152.073 CLi=0.540115 Chord=0.175783 Solidity=0.279767 ConstructXoC=0.25 FeatherAxisXoC=0.25 FeatherOffsetXoC=0
  cross sections:
    n  RadiusFrac  shape
    0  0.118033    airfoil file "BOEING-VERTOL VR-12 AIRFOIL"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 BaseThickChord=0.106373 Chord=0.32 ThickChord=0.5
    1  0.247542    airfoil file "BOEING-VERTOL VR-12 AIRFOIL"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 BaseThickChord=0.106373 Chord=0.526058 Scale=0.707143 ThickChord=0.235885
    2  0.315387    airfoil file "SIKORSKY SSC-A09  AIRFOIL"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 BaseThickChord=0.0901604 Chord=0.61548 Scale=1.5 ThickChord=0.188963
    3  1           airfoil file "SIKORSKY SSC-A09  AIRFOIL"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 BaseThickChord=0.0901604 Chord=0.52 Scale=0.357143 ThickChord=0.03
  blade curves as in "IB_FWD_PROP"

Propeller "MID_AFT_PROP", child of "MID_PROP"
  location (X Y Z) 17.438 -15.034 5.6, rotation 0 90 0
  symmetric about XZ
  bounding box size 7.68683 37.7548 0.581748
  Design: Diameter=8 NumBlade=4 Beta34=20 UseBeta34Flag=1 Feather=0 Rotate=72 Precone=0 ReverseFlag=1 FoldAngle=0 PropMode=0 AF=152.073 CLi=0.540115 Chord=0.175783 Solidity=0.223813 ConstructXoC=0.25 FeatherAxisXoC=0.25 FeatherOffsetXoC=0
  cross sections:
    n  RadiusFrac  shape
    0  0.118033    airfoil file "BOEING-VERTOL VR-12 AIRFOIL"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 BaseThickChord=0.106373 Chord=0.32 ThickChord=0.5
    1  0.247542    airfoil file "BOEING-VERTOL VR-12 AIRFOIL"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 BaseThickChord=0.106373 Chord=0.526058 Scale=0.707143 ThickChord=0.235885
    2  0.315387    airfoil file "SIKORSKY SSC-A09  AIRFOIL"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 BaseThickChord=0.0901604 Chord=0.61548 Scale=1.5 ThickChord=0.188963
    3  1           airfoil file "SIKORSKY SSC-A09  AIRFOIL"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 BaseThickChord=0.0901604 Chord=0.52 Scale=0.357143 ThickChord=0.03
  blade curves as in "IB_FWD_PROP"

Blank "OB_PROP", child of "PROP"
  location (X Y Z) 0 0 5, rotation 0 0 0

Fuselage "OB_SUPPORT_L_FWD", child of "OB_PROP"
  location (X Y Z) 4.34426 -22.623 5, rotation 0 0 1.63934
  bounding box size 13.1018 1.50683 1.16568
  Design: Length=13.1071
  cross sections:
    n  XLocPercent  YLocPercent  ZLocPercent  shape
    0  0            0            0            point
    1  0.25         0            0            circle Circle_Diameter=0.729962
    2  0.5          0            0            as above
    3  0.75         0            0            as above
    4  1            0            0            point

Fuselage "OB_SUPPORT_L_AFT", child of "OB_PROP"
  location (X Y Z) 4.34426 -22.623 5, rotation 0 0 1.63934
  bounding box size 13.1018 1.50683 1.16568
  Design: Length=13.1071
  cross sections:
    n  XLocPercent  YLocPercent  ZLocPercent  shape
    0  0            0            0            point
    1  0.25         0            0            circle Circle_Diameter=0.729962
    2  0.5          0            0            as above
    3  0.75         0            0            as above
    4  1            0            0            point

Fuselage "OB_SUPPORT_R", child of "OB_PROP"
  location (X Y Z) 4.34426 22.623 5, rotation 0 0 -1.639
  bounding box size 13.1018 1.50676 1.16568
  Design: Length=13.1071
  cross sections:
    n  XLocPercent  YLocPercent  ZLocPercent  shape
    0  0            0            0            point
    1  0.25         0            0            circle Circle_Diameter=0.729962
    2  0.5          0            0            as above
    3  0.75         0            0            as above
    4  1            0            0            point

Fuselage "ROTOR_HUB_OB_FWD_L", child of "OB_PROP"
  location (X Y Z) 4.262 -22.6718 5.98361, rotation 0 90 0
  bounding box size 1.11927 1.11927 1
  Design: Length=1
  cross sections:
    n  XLocPercent  YLocPercent  ZLocPercent  shape
    0  0            0            0            point
    1  0.25         0            0            circle Circle_Diameter=1.11927
    2  0.5          0            0            as above
    3  0.75         0            0            as above
    4  1            0            0            point

Fuselage "ROTOR_HUB_OB_FWD_R", child of "OB_PROP"
  location (X Y Z) 4.262 22.672 5.98361, rotation 0 90 0
  bounding box size 1.11927 1.11927 1
  Design: Length=1
  cross sections:
    n  XLocPercent  YLocPercent  ZLocPercent  shape
    0  0            0            0            point
    1  0.25         0            0            circle Circle_Diameter=1.11927
    2  0.5          0            0            as above
    3  0.75         0            0            as above
    4  1            0            0            point

Fuselage "ROTOR_HUB_OB_AFT_L", child of "OB_PROP"
  location (X Y Z) 17.4377 -22.25 5.98361, rotation 0 90 0
  bounding box size 1.11927 1.11927 1
  Design: Length=1
  cross sections:
    n  XLocPercent  YLocPercent  ZLocPercent  shape
    0  0            0            0            point
    1  0.25         0            0            circle Circle_Diameter=1.11927
    2  0.5          0            0            as above
    3  0.75         0            0            as above
    4  1            0            0            point

Fuselage "ROTOR_HUB_OB_AFT_R", child of "OB_PROP"
  location (X Y Z) 17.4377 22.25 5.98361, rotation 0 90 0
  bounding box size 1.11927 1.11927 1
  Design: Length=1
  cross sections:
    n  XLocPercent  YLocPercent  ZLocPercent  shape
    0  0            0            0            point
    1  0.25         0            0            circle Circle_Diameter=1.11927
    2  0.5          0            0            as above
    3  0.75         0            0            as above
    4  1            0            0            point

Propeller "OB_FWD_PROP", child of "OB_PROP"
  location (X Y Z) 4.2623 -22.623 5.6, rotation 0 90 0
  symmetric about XZ
  bounding box size 7.66449 51.8671 0.581748
  Design: Diameter=8 NumBlade=5 Beta34=20 UseBeta34Flag=1 Feather=0 Rotate=72 Precone=0 ReverseFlag=1 FoldAngle=0 PropMode=0 AF=152.073 CLi=0.540115 Chord=0.175783 Solidity=0.279767 ConstructXoC=0.25 FeatherAxisXoC=0.25 FeatherOffsetXoC=0
  cross sections:
    n  RadiusFrac  shape
    0  0.118033    airfoil file "BOEING-VERTOL VR-12 AIRFOIL"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 BaseThickChord=0.106373 Chord=0.32 ThickChord=0.5
    1  0.247542    airfoil file "BOEING-VERTOL VR-12 AIRFOIL"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 BaseThickChord=0.106373 Chord=0.526058 Scale=0.707143 ThickChord=0.235885
    2  0.315387    airfoil file "SIKORSKY SSC-A09  AIRFOIL"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 BaseThickChord=0.0901604 Chord=0.61548 Scale=1.5 ThickChord=0.188963
    3  1           airfoil file "SIKORSKY SSC-A09  AIRFOIL"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 BaseThickChord=0.0901604 Chord=0.52 Scale=0.357143 ThickChord=0.03
  blade curves as in "IB_FWD_PROP"

Propeller "OB_AFT_PROP", child of "OB_PROP"
  location (X Y Z) 17.438 -22.25 5.6, rotation 0 90 0
  symmetric about XZ
  bounding box size 7.68683 52.1868 0.581748
  Design: Diameter=8 NumBlade=4 Beta34=20 UseBeta34Flag=1 Feather=0 Rotate=72 Precone=0 ReverseFlag=1 FoldAngle=0 PropMode=0 AF=152.073 CLi=0.540115 Chord=0.175783 Solidity=0.223813 ConstructXoC=0.25 FeatherAxisXoC=0.25 FeatherOffsetXoC=0
  cross sections:
    n  RadiusFrac  shape
    0  0.118033    airfoil file "BOEING-VERTOL VR-12 AIRFOIL"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 BaseThickChord=0.106373 Chord=0.32 ThickChord=0.5
    1  0.247542    airfoil file "BOEING-VERTOL VR-12 AIRFOIL"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 BaseThickChord=0.106373 Chord=0.526058 Scale=0.707143 ThickChord=0.235885
    2  0.315387    airfoil file "SIKORSKY SSC-A09  AIRFOIL"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 BaseThickChord=0.0901604 Chord=0.61548 Scale=1.5 ThickChord=0.188963
    3  1           airfoil file "SIKORSKY SSC-A09  AIRFOIL"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 BaseThickChord=0.0901604 Chord=0.52 Scale=0.357143 ThickChord=0.03
  blade curves as in "IB_FWD_PROP"

Wing "OB_AILERON"
  location (X Y Z) 9.2376 16.1513 5.53298, rotation 0 0 0
  symmetric about XZ
  bounding box size 1.11529 43.5425 0.256378
  totals: TotalSpan=11.24 TotalProjectedSpan=11.24 TotalChord=3.65299 TotalArea=41.0596 TotalAR=3.07693 MAC=0.759886
  root: chord 3.65299, twist 0, airfoil file "NASA/LANGLEY LS(1)-0417 (GA(W)-1) AIRFOIL flap only"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 BaseThickChord=0.0753487 ThickChord=0.0753487
  sections:
    n  Span  Root_Chord  Tip_Chord  Area     Sweep  Sweep_Location  Dihedral  Twist  Twist_Location  tip airfoil
    1  5.62  3.65299     3.65299    20.5298  -3.5   0               0         0      0.25            as above

Wing "IB_FLAP"
  location (X Y Z) 10.0859 3.91399 5.53298, rotation 0 0 0
  symmetric about XZ
  bounding box size 0.895361 11.8765 0.256378
  totals: TotalSpan=4.04851 TotalProjectedSpan=4.04851 TotalChord=3.65299 TotalArea=14.7892 TotalAR=1.10827 MAC=0.759886
  root: chord 3.65299, twist 0, airfoil file "NASA/LANGLEY LS(1)-0417 (GA(W)-1) AIRFOIL flap only"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 BaseThickChord=0.0753487 ThickChord=0.0753487
  sections:
    n  Span     Root_Chord  Tip_Chord  Area     Sweep  Sweep_Location  Dihedral  Twist  Twist_Location  tip airfoil
    1  2.02426  3.65299     3.65299    7.39458  -3.5   0               0         0      0.25            as above

Wing "MID_FLAP"
  location (X Y Z) 9.8001 8.2 5.53298, rotation 0 0 0
  symmetric about XZ
  bounding box size 1.11708 27.6986 0.256378
  totals: TotalSpan=11.2986 TotalProjectedSpan=11.2986 TotalChord=3.65299 TotalArea=41.2736 TotalAR=3.09297 MAC=0.759886
  root: chord 3.65299, twist 0, airfoil file "NASA/LANGLEY LS(1)-0417 (GA(W)-1) AIRFOIL flap only"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 BaseThickChord=0.0753487 ThickChord=0.0753487
  sections:
    n  Span     Root_Chord  Tip_Chord  Area     Sweep  Sweep_Location  Dihedral  Twist  Twist_Location  tip airfoil
    1  5.64929  3.65299     3.65299    20.6368  -3.5   0               0         0      0.25            as above
