OpenVSP model (file version 5), 27 components.
Geometry view with OpenVSP parameter names; values to 6 digits, angles in degrees, lengths in the model's unit.
Overall bounding box: X_Min=0 X_Len=365.265 Y_Min=-194.89 Y_Len=389.779 Z_Min=0 Z_Len=131.284

Blank "Origin"
  location (X Y Z) 0 0 0, rotation 0 0 0

Fuselage "Fuselage", child of "Origin"
  location (X Y Z) 22.6637 0 50.9924, rotation 0 0 0
  bounding box size 328.715 49.3528 55.7551
  Design: Length=328.715
  cross sections:
    n  XLocPercent  YLocPercent  ZLocPercent  shape
    0  0            0            0            point
    1  0.024145     0            -0.002082    general fuselage BotStr=0.827589 BotTanAngle=90 CornerRad=0 Height=15.505 LowStr=0.81429 MaxWidthLoc=0.024812 TopStr=1.10925 TopTanAngle=90 UpStr=0.692274 Width=17.6909
    2  0.121627     0            0.016498     general fuselage BotStr=1.19151 BotTanAngle=90 CornerRad=0 Height=33.5102 LowStr=1.27081 MaxWidthLoc=-0.117303 TopStr=0.342421 TopTanAngle=90 UpStr=1.7302 Width=37.1263
    3  0.296705     0            0.04395      general fuselage BotStr=1.42426 BotTanAngle=90 CornerRad=0 Height=52.0793 LowStr=1.42286 MaxWidthLoc=-0.190324 TopStr=1.00146 TopTanAngle=90 UpStr=2 Width=47.3885
    4  0.479564     0            0.042478     general fuselage BotStr=1.16875 BotTanAngle=90 CornerRad=0 Height=50.5893 LowStr=1.5 MaxWidthLoc=-0.125562 TopStr=1.25 TopTanAngle=90 UpStr=1.50472 Width=44.5205
    5  0.671993     0            0.03643      general fuselage BotStr=1.03404 BotTanAngle=90 CornerRad=0 Height=32.3042 LowStr=1.0683 MaxWidthLoc=-0.310309 TopStr=1.85654 TopTanAngle=90 UpStr=0.818164 Width=29.8883
    6  0.923427     0            0.041126     general fuselage BotStr=0.952476 BotTanAngle=90 CornerRad=0 Height=16.2922 LowStr=0.67819 MaxWidthLoc=-0.500607 TopStr=2 TopTanAngle=90 UpStr=1.27804 Width=10.4965
    7  1            0            0.045371     point

Hinge "HorzStab-Hinge", child of "Origin"
  location (X Y Z) 334.975 0 64.8763, rotation -180 0 -90
  Hinge: JointRotMax=30 JointRotMaxFlag=1 JointRotMin=-21 JointRotMinFlag=1 JointRotate=0 JointRotateFlag=1 JointTransMax=1000 JointTransMaxFlag=0 JointTransMin=-1000 JointTransMinFlag=0 JointTranslate=0 JointTranslateFlag=0 OrientRotFlag=1 PrimOffAbsRelFlag=1 PrimType=0 PrimULoc=0 PrimVecAbsRelFlag=1 PrimWLoc=0 PrimXOff=0 PrimXOffRel=0 PrimXVec=0 PrimXVecRel=0 PrimYOff=0 PrimYOffRel=0 PrimYVec=1 PrimYVecRel=1 PrimZOff=0 PrimZOffRel=0 PrimZVec=0 PrimZVecRel=0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

Wing "HorzStab", child of "HorzStab-Hinge"
  location (X Y Z) 327.046 0 64.7972, rotation 0 0 0; relative location 0 -7.929 0.07908, rotation 180 0 -90
  symmetric about XZ
  bounding box size 30.6413 128.95 3.42577
  totals: TotalSpan=123.811 TotalProjectedSpan=123.811 TotalChord=30.6413 TotalArea=3793.73 TotalAR=4.04066
  root: chord 30.6413, twist 0, NACA 4-series Camber=0 CamberLoc=0.2 ThickChord=0.11
  sections:
    n  Span     Root_Chord  Tip_Chord  Area     Sweep  Sweep_Location  Dihedral  Twist  Twist_Location  tip airfoil
    1  2.42124  30.6413     30.6413    74.1899  0      0               0         0      0.25            as above
    2  5.31852  30.6413     30.6413    162.966  0      0               0         0      0.25            as above
    3  30.7602  30.6413     30.6413    942.532  0      0               0         0      0.25            as above
    4  0.12     30.6413     30.6413    3.67695  0      0               0         0      0.25            as above
    5  23.2855  30.6413     30.6413    713.498  0      0               0         0      0.25            as above

Hinge "TrimTab-Hinge", child of "HorzStab"
  location (X Y Z) 352.303 0 65.5646, rotation 0 0 0; relative location 25.2575 0 0.7674, rotation 0 0 0
  Hinge: JointRotMax=30 JointRotMaxFlag=1 JointRotMin=-30 JointRotMinFlag=1 JointRotate=0 JointRotateFlag=1 JointTransMax=1000 JointTransMaxFlag=0 JointTransMin=-1000 JointTransMinFlag=0 JointTranslate=0 JointTranslateFlag=0 OrientRotFlag=0 PrimOffAbsRelFlag=1 PrimType=0 PrimULoc=0 PrimVecAbsRelFlag=1 PrimWLoc=0 PrimXOff=0 PrimXOffRel=0 PrimXVec=0 PrimXVecRel=0 PrimYOff=0 PrimYOffRel=0 PrimYVec=1 PrimYVecRel=1 PrimZOff=0 PrimZOffRel=0 PrimZVec=0 PrimZVecRel=0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

Wing "TrimTab", child of "TrimTab-Hinge"
  location (X Y Z) 327.048 0 64.8, rotation 0 0 0; relative location -25.2554 0 -0.76464, rotation 0 0 0
  symmetric about XZ
  bounding box size 5.22129 76.9999 1.14252
  totals: TotalSpan=76.9999 TotalProjectedSpan=76.9999 TotalChord=30.6413 TotalArea=2359.38 TotalAR=2.51295
  root: chord 30.6413, twist 0, NACA 4-series Camber=0 CamberLoc=0.2 ThickChord=0.11
  sections:
    n  Span  Root_Chord  Tip_Chord  Area     Sweep  Sweep_Location  Dihedral  Twist  Twist_Location  tip airfoil
    1  38.5  30.6413     30.6413    1179.69  0      0               0         0      0.25            as above

Wing "TrimTab-Tab", child of "TrimTab"
  location (X Y Z) 357.689 0 64.8631, rotation 0 0 0; relative location -0.063052 0 0, rotation -90 -90 0
  symmetric about XZ
  bounding box size 0.048 76.9999 0.17364
  totals: TotalSpan=76.9999 TotalProjectedSpan=76.9999 TotalChord=0.048 TotalArea=3.696 TotalAR=1604.16
  root: chord 0.048, twist 0, rounded rectangle RoundRectXSec_Radius=0 RoundedRect_Height=0.17364 RoundedRect_Width=0.048
  sections:
    n  Span  Root_Chord  Tip_Chord  Area   Sweep  Sweep_Location  Dihedral  Twist  Twist_Location  tip airfoil
    1  38.5  0.048       0.048      1.848  0      0               0         0      0.25            as above

Wing "VertTail", child of "Origin"
  location (X Y Z) 276 0 67.464, rotation 90 0 0
  symmetric about XZ
  bounding box size 78.3628 6.25121 63.8204
  totals: TotalSpan=127.641 TotalProjectedSpan=127.641 TotalChord=52.8053 TotalArea=6047.8 TotalAR=2.69391
  root: chord 75.2748, twist 0, airfoil file "Tecnam_Vtail_Z_Z67.464_max0.562169_TE0.743854"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 BaseThickChord=0.0830421 ThickChord=0.0830421
  sections:
    n   Span     Root_Chord  Tip_Chord  Area     Sweep    Sweep_Location  Dihedral  Twist  Twist_Location  tip airfoil
    1   4.7268   75.2748     76.488     358.676  0        0               0         0      0.25            airfoil file "Tecnam_Vtail_Y2_Z72.1902_max0.588102_TE0.755265"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 BaseThickChord=0.0781229 ThickChord=0.0781229
    2   0.1188   76.488      76.518     9.08856  0        0               0         0      0.25            airfoil file "Tecnam_Vtail_Y_Z72.3088_max0.588742"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 BaseThickChord=0.0780015 ThickChord=0.0780015
    3   3.528    76.518      77.424     271.554  0        0               0         0      0.25            airfoil file "Tecnam_Vtail_LE-0_Z75.8364_max0.607554"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 BaseThickChord=0.0744338 ThickChord=0.0744338
    4   0.5868   77.424      72.5988    44.0167  83.2753  0               0         0      0.25            airfoil file "Tecnam_Vtail_LE-1_Z76.423_max0.583957"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 BaseThickChord=0.0789091 ThickChord=0.0789091
    5   1.3272   72.5988     67.002     92.6391  77.4028  0               0         0      0.25            airfoil file "Tecnam_Vtail_LE-2_Z77.75_max0.555287"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 BaseThickChord=0.0843476 ThickChord=0.0843476
    6   1.716    67.002      62.5908    111.191  70.5299  0               0         0      0.25            airfoil file "Tecnam_Vtail_A_Z79.466_max0.532368"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 BaseThickChord=0.0886952 ThickChord=0.0886952
    7   2.034    62.5908     58.8516    123.507  64.4824  0               0         0      0.25            airfoil file "Tecnam_Vtail_LE-3_Z81.5_max0.51328"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 BaseThickChord=0.0923162 ThickChord=0.0923162
    8   2.4576   58.8516     55.4424    140.444  58.6903  0               0         0      0.25            airfoil file "Tecnam_Vtail_B_Z83.9573_max0.496971"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 BaseThickChord=0.0954102 ThickChord=0.0954102
    9   5.4672   55.4424     50.2344    288.878  50.4092  0               0         0      0.25            airfoil file "Vtail - short chord"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 BaseThickChord=0.0989597 ThickChord=0.0989597
    10  0.054    50.2344     50.202     2.71178  40.7892  0               0         0      0.25            as above
    11  5.484    50.202      46.9716    266.45   40.2209  0               0         0      0.25            as above
    12  1.638    46.9716     46.0068    76.1493  40.221   0               0         0      0.25            airfoil file "Tecnam_Vtail_V_Z96.6004_TE0.94804"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 BaseThickChord=0.0989597 ThickChord=0.0989597
    13  4.8996   46.0068     43.1208    218.345  40.2209  0               0         0      0.25            airfoil file "Tecnam_Vtail_LE-5_Z101.5_TE0.944544"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 BaseThickChord=0.0989597 ThickChord=0.0989597
    14  12.9996  43.1208     35.4648    510.791  40.2209  0               0         0      0.25            airfoil file "Tecnam_Vtail_LE-6_Z114.5_TE0.932513"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 BaseThickChord=0.0989597 ThickChord=0.0989597
    15  12.6696  35.4648     28.002     402.049  40.2207  0               0         0      0.25            airfoil file "Tecnam_Vtail_D_Z127.169_TE0.914458"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 BaseThickChord=0.0989597 ThickChord=0.0989597
    16  0.24     28.002      27.84      6.70104  14.39    1               0         0      0.25            as above
    17  1.92     27.84       26.4       52.0704  14.39    1               0         0      0.25            NACA 4-series Camber=0 CamberLoc=0.2 ThickChord=0.09989
    18  1.95324  26.4        23.4       48.6357  14.39    1               0         0      0.25            NACA 4-series Camber=0 CamberLoc=0.2 ThickChord=0.057

Hinge "Rudder-Hinge", child of "VertTail"
  location (X Y Z) 354.348 0 127.308, rotation -180 71.6251 -180; relative location 78.348 0 59.844, rotation -180 71.6251 -180
  Hinge: JointRotMax=30 JointRotMaxFlag=1 JointRotMin=-30 JointRotMinFlag=1 JointRotate=0 JointRotateFlag=1 JointTransMax=1000 JointTransMaxFlag=0 JointTransMin=-1000 JointTransMinFlag=0 JointTranslate=0 JointTranslateFlag=0 OrientRotFlag=1 PrimOffAbsRelFlag=0 PrimType=1 PrimULoc=0 PrimVecAbsRelFlag=1 PrimWLoc=0 PrimXOff=336.096 PrimXOffRel=60.096 PrimXVec=-0.315233 PrimXVecRel=-0.315233 PrimYOff=0 PrimYOffRel=0 PrimYVec=0 PrimYVecRel=0 PrimZOff=72.36 PrimZOffRel=4.896 PrimZVec=-0.949014 PrimZVecRel=-0.949014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

Wing "Rudder", child of "Rudder-Hinge"
  location (X Y Z) 276 0 72.3, rotation 90 0 0; relative location 76.9012 0 -57.0131, rotation 90 0 108.375
  symmetric about XZ
  bounding box size 29.1943 3.90757 58.9748
  totals: TotalSpan=117.95 TotalProjectedSpan=117.95 TotalChord=49.8819 TotalArea=5312.27 TotalAR=2.61887
  root: chord 76.518, twist 0, airfoil file "Tecnam_Vtail_Y_Z72.3088_max0.588742"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 BaseThickChord=0.0780015 ThickChord=0.0780015
  sections:
    n   Span     Root_Chord  Tip_Chord  Area     Sweep    Sweep_Location  Dihedral  Twist  Twist_Location  tip airfoil
    1   3.528    76.518      77.424     271.554  0        0               0         0      0.25            airfoil file "Tecnam_Vtail_LE-0_Z75.8364_max0.607554"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 BaseThickChord=0.0744338 ThickChord=0.0744338
    2   0.5868   77.424      72.5988    44.0167  83.2753  0               0         0      0.25            airfoil file "Tecnam_Vtail_LE-1_Z76.423_max0.583957"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 BaseThickChord=0.0789091 ThickChord=0.0789091
    3   1.3272   72.5988     67.002     92.6391  77.4028  0               0         0      0.25            airfoil file "Tecnam_Vtail_LE-2_Z77.75_max0.555287"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 BaseThickChord=0.0843476 ThickChord=0.0843476
    4   1.716    67.002      62.5908    111.191  70.5299  0               0         0      0.25            airfoil file "Tecnam_Vtail_A_Z79.466_max0.532368"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 BaseThickChord=0.0886952 ThickChord=0.0886952
    5   2.034    62.5908     58.8516    123.507  64.4824  0               0         0      0.25            airfoil file "Tecnam_Vtail_LE-3_Z81.5_max0.51328"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 BaseThickChord=0.0923162 ThickChord=0.0923162
    6   2.4576   58.8516     55.4424    140.444  58.6903  0               0         0      0.25            airfoil file "Tecnam_Vtail_B_Z83.9573_max0.496971"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 BaseThickChord=0.0954102 ThickChord=0.0954102
    7   5.4672   55.4424     50.2344    288.878  50.4092  0               0         0      0.25            airfoil file "Vtail - short chord"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 BaseThickChord=0.0989597 ThickChord=0.0989597
    8   0.054    50.2344     50.202     2.71178  40.7892  0               0         0      0.25            as above
    9   5.484    50.202      46.9716    266.45   40.2209  0               0         0      0.25            as above
    10  1.638    46.9716     46.0068    76.1493  40.221   0               0         0      0.25            airfoil file "Tecnam_Vtail_V_Z96.6004_TE0.94804"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 BaseThickChord=0.0989597 ThickChord=0.0989597
    11  4.8996   46.0068     43.1208    218.345  40.2209  0               0         0      0.25            airfoil file "Tecnam_Vtail_LE-5_Z101.5_TE0.944544"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 BaseThickChord=0.0989597 ThickChord=0.0989597
    12  12.9996  43.1208     35.4648    510.791  40.2209  0               0         0      0.25            airfoil file "Tecnam_Vtail_LE-6_Z114.5_TE0.932513"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 BaseThickChord=0.0989597 ThickChord=0.0989597
    13  12.6696  35.4648     28.002     402.049  40.2207  0               0         0      0.25            airfoil file "Tecnam_Vtail_D_Z127.169_TE0.914458"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 BaseThickChord=0.0989597 ThickChord=0.0989597
    14  0.24     28.002      27.84      6.70104  14.39    1               0         0      0.25            as above
    15  1.92     27.84       26.4       52.0704  14.39    1               0         0      0.25            NACA 4-series Camber=0 CamberLoc=0.2 ThickChord=0.09989
    16  1.95324  26.4        23.4       48.6357  14.39    1               0         0      0.25            NACA 4-series Camber=0 CamberLoc=0.2 ThickChord=0.057

Stack "Rudder_TStrip", child of "Rudder"
  location (X Y Z) 356.385 0.000511474 96.5968, rotation -180 75.6137 0.000198871; relative location 0 0 0.0156, rotation 0 0 0
  bounding box size 7.87634 1.26215 30.5938
  cross sections:
    n  XDelta  YDelta  ZDelta  shape
    0  0       0       0       point
    1  0       0       0       rounded rectangle RoundRectXSec_Radius=0 RoundedRect_Height=0.03204 RoundedRect_Width=1.26204
    2  31.576  0       0       as above
    3  0       0       0       point

Blank "Wing_Parent", child of "Origin"
  location (X Y Z) 144.849 0 86.691, rotation 0 0 0

Wing "CleanWing", child of "Wing_Parent"
  location (X Y Z) 144.849 0 86.691, rotation 0 0 0; relative location 0 0 0, rotation 0 0 0
  symmetric about XZ
  bounding box size 29.7448 379.473 4.65063
  totals: TotalSpan=379.473 TotalProjectedSpan=379.473 TotalChord=25.2982 TotalArea=9600 TotalAR=15
  root: chord 29.7626, twist 2, airfoil file "hccl-5.4 (new4)_Y=00.000_C=2.480219_TE-abs:4.mm_TE-z/c:.005292"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 BaseThickChord=0.149666 ThickChord=0.149666
  sections:
    n  Span     Root_Chord  Tip_Chord  Area  Sweep  Sweep_Location  Dihedral  Twist  Twist_Location  tip airfoil
    1  189.737  29.7626     20.8338    4800  0      0.7             0         0      0.7             airfoil file "hccl-5.4 (new4)_Y=15.811388_C=1.736151_TE-abs:4.mm_TE-z/c:.007559"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 BaseThickChord=0.149675 ThickChord=0.149675

Blank "WingLE_Marker", child of "CleanWing"
  location (X Y Z) 144.873 0 87.7556, rotation 0 0 0; relative location 0 0 0, rotation 0 0 0

Wing "Pylon_07", child of "Wing_Parent"
  location (X Y Z) 147.19 34.98 87.291, rotation -90 0 0; relative location 2.34087 34.98 0.6, rotation -90 0 0
  symmetric about XZ
  bounding box size 21.2 73.5869 3
  totals: TotalSpan=6 TotalProjectedSpan=6 TotalChord=21.2 TotalArea=127.2 TotalAR=0.283018
  root: chord 21.2, twist 0, airfoil file "pylon7_tovc-0.17099_xcmaxtoc-0.38915_te_thick-0.09346"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 BaseThickChord=0.171042 ThickChord=0.171042
  sections:
    n  Span  Root_Chord  Tip_Chord  Area     Sweep  Sweep_Location  Dihedral  Twist  Twist_Location  tip airfoil
    1  3     21.2        21.2       63.6001  0      0               0         0      0.25            as above

Fuselage "HL_Spinner", child of "Pylon_07"
  location (X Y Z) 129.826 34.98 82.491, rotation 0 0 0; relative location -17.364 0 -4.8, rotation 0 0 0
  symmetric about XZ
  bounding box size 8.4 76.32 6.36
  Design: Length=8.4
  cross sections:
    n  XLocPercent  YLocPercent  ZLocPercent  shape
    0  0            0            0            point
    1  0.714286     0            0            circle Circle_Diameter=6.12
    2  1            0            0            circle Circle_Diameter=6.36
    3  1            0            0            point

Wing "Pylon_08", child of "Wing_Parent"
  location (X Y Z) 147.935 57.66 87.291, rotation -90 0 0; relative location 3.08595 57.66 0.6, rotation -90 0 0
  symmetric about XZ
  bounding box size 18.5964 118.947 3.6
  totals: TotalSpan=7.2 TotalProjectedSpan=7.2 TotalChord=18.5 TotalArea=133.2 TotalAR=0.389188
  root: chord 18.5, twist 0, airfoil file "pylon8_tovc-0.19595_xcmaxtoc-0.44594_te_thick-0.01363"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 BaseThickChord=0.196027 ThickChord=0.196027
  sections:
    n  Span  Root_Chord  Tip_Chord  Area     Sweep  Sweep_Location  Dihedral  Twist  Twist_Location  tip airfoil
    1  3.6   18.5        18.5       66.6001  0      0               0         0      0.25            as above

Fuselage "HL_Spinner", child of "Pylon_08"
  location (X Y Z) 131.807 57.66 82.491, rotation 0 0 0; relative location -16.128 0 -4.8, rotation 0 0 0
  symmetric about XZ
  bounding box size 8.4 121.68 6.36
  Design: Length=8.4
  cross sections:
    n  XLocPercent  YLocPercent  ZLocPercent  shape
    0  0            0            0            point
    1  0.714286     0            0            circle Circle_Diameter=6.12
    2  1            0            0            circle Circle_Diameter=6.36
    3  1            0            0            point

Wing "Pylon_09", child of "Wing_Parent"
  location (X Y Z) 148.679 80.34 87.291, rotation -90 0 0; relative location 3.82995 80.34 0.6, rotation -90 0 0
  symmetric about XZ
  bounding box size 19.6 164.306 3
  totals: TotalSpan=6 TotalProjectedSpan=6 TotalChord=19.6 TotalArea=117.6 TotalAR=0.306123
  root: chord 19.6, twist 0, airfoil file "pylon9_tovc-0.18495_xcmaxtoc-0.42092_te_thick-0.10204"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 BaseThickChord=0.185009 ThickChord=0.185009
  sections:
    n  Span  Root_Chord  Tip_Chord  Area     Sweep  Sweep_Location  Dihedral  Twist  Twist_Location  tip airfoil
    1  3     19.6        19.6       58.7999  0      0               0         0      0.25            as above

Fuselage "HL_Spinner", child of "Pylon_09"
  location (X Y Z) 129.827 80.34 82.491, rotation 0 0 0; relative location -18.852 0 -4.8, rotation 0 0 0
  symmetric about XZ
  bounding box size 8.4 167.04 6.36
  Design: Length=8.4
  cross sections:
    n  XLocPercent  YLocPercent  ZLocPercent  shape
    0  0            0            0            point
    1  0.714286     0            0            circle Circle_Diameter=6.12
    2  1            0            0            circle Circle_Diameter=6.36
    3  1            0            0            point

Wing "Pylon_10", child of "Wing_Parent"
  location (X Y Z) 149.423 103.02 87.291, rotation -90 0 0; relative location 4.57395 103.02 0.6, rotation -90 0 0
  symmetric about XZ
  bounding box size 18.6965 209.667 3.6
  totals: TotalSpan=7.2 TotalProjectedSpan=7.2 TotalChord=18.6 TotalArea=133.92 TotalAR=0.387097
  root: chord 18.6, twist 0, airfoil file "pylon10_tovc-0.19489_xcmaxtoc-0.44355_te_thick-0.01355"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 BaseThickChord=0.194966 ThickChord=0.194966
  sections:
    n  Span  Root_Chord  Tip_Chord  Area   Sweep  Sweep_Location  Dihedral  Twist  Twist_Location  tip airfoil
    1  3.6   18.6        18.6       66.96  0      0               0         0      0.25            as above

Fuselage "HL_Spinner", child of "Pylon_10"
  location (X Y Z) 133.295 103.02 82.491, rotation 0 0 0; relative location -16.128 0 -4.8, rotation 0 0 0
  symmetric about XZ
  bounding box size 8.4 212.4 6.36
  Design: Length=8.4
  cross sections:
    n  XLocPercent  YLocPercent  ZLocPercent  shape
    0  0            0            0            point
    1  0.714286     0            0            circle Circle_Diameter=6.12
    2  1            0            0            circle Circle_Diameter=6.36
    3  1            0            0            point

Wing "Pylon_11", child of "Wing_Parent"
  location (X Y Z) 150.168 125.7 87.291, rotation -90 0 0; relative location 5.31891 125.7 0.6, rotation -90 0 0
  symmetric about XZ
  bounding box size 18.1 255.027 3
  totals: TotalSpan=6 TotalProjectedSpan=6 TotalChord=18.1 TotalArea=108.6 TotalAR=0.331492
  root: chord 18.1, twist 0, airfoil file "pylon11_tovc-0.20028_xcmaxtoc-0.45580_te_thick-0.11050"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 BaseThickChord=0.20035 ThickChord=0.20035
  sections:
    n  Span  Root_Chord  Tip_Chord  Area     Sweep  Sweep_Location  Dihedral  Twist  Twist_Location  tip airfoil
    1  3     18.1        18.1       54.2999  0      0               0         0      0.25            as above

Fuselage "HL_Spinner", child of "Pylon_11"
  location (X Y Z) 131.316 125.7 82.491, rotation 0 0 0; relative location -18.852 0 -4.8, rotation 0 0 0
  symmetric about XZ
  bounding box size 8.4 257.76 6.36
  Design: Length=8.4
  cross sections:
    n  XLocPercent  YLocPercent  ZLocPercent  shape
    0  0            0            0            point
    1  0.714286     0            0            circle Circle_Diameter=6.12
    2  1            0            0            circle Circle_Diameter=6.36
    3  1            0            0            point

Wing "Pylon_12", child of "Wing_Parent"
  location (X Y Z) 150.912 148.38 87.291, rotation -90 0 0; relative location 6.06291 148.38 0.6, rotation -90 0 0
  symmetric about XZ
  bounding box size 18.7968 300.387 3.6
  totals: TotalSpan=7.2 TotalProjectedSpan=7.2 TotalChord=18.7 TotalArea=134.64 TotalAR=0.385028
  root: chord 18.7, twist 0, airfoil file "pylon12_tovc-0.19385_xcmaxtoc-0.44118_te_thick-0.01348"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 BaseThickChord=0.193925 ThickChord=0.193925
  sections:
    n  Span  Root_Chord  Tip_Chord  Area     Sweep  Sweep_Location  Dihedral  Twist  Twist_Location  tip airfoil
    1  2.58  18.7        18.7       48.2459  0      0               0         0      0.25            as above
    2  1.02  18.7        18.7       19.074   0      0               0         0      0.25            as above

Fuselage "HL_Spinner", child of "Pylon_12"
  location (X Y Z) 134.808 148.38 82.491, rotation 0 0 0; relative location -16.104 0 -4.8, rotation 0 0 0
  symmetric about XZ
  bounding box size 8.4 303.12 6.36
  Design: Length=8.4
  cross sections:
    n  XLocPercent  YLocPercent  ZLocPercent  shape
    0  0            0            0            point
    1  0.714286     0            0            circle Circle_Diameter=6.12
    2  1            0            0            circle Circle_Diameter=6.36
    3  1            0            0            point

Stack "CruiseNacelle-Spinner", child of "Wing_Parent"
  location (X Y Z) 126.381 189.741 87.649, rotation 0 0 0; relative location -18.4682 189.741 0.958024, rotation 0 0 0
  symmetric about XZ
  bounding box size 14.961 389.779 10.2971
  cross sections:
    n  XDelta  YDelta  ZDelta  shape
    0  0       0       0       point
    1  5       0       0       circle Circle_Diameter=7.75
    2  9.961   0       0       circle Circle_Diameter=10.2971
    3  0       0       0       point
